# Казанцев Илья. Вариант 2
# Задание 2
x := 4.13, 4.23 .. 5.43
y(x) := log(ln(x)) + ln(log(x))
y(x) = [-0.332828; -0.308835; -0.285784; -0.263611; -0.24226; -0.221678; -0.201818; -0.182636; -0.164093; -0.146152; -0.128779; -0.111944; -0.095617; -0.0797724]
