# Казанцев Илья. Вариант 25
# 1) Пусть M – квадратная матрица 5x5 с элементами, вычисленными по формуле M_nm= n + m, и диагональными элементами, вычисленными по формуле M_nn= 2n + 0.1.
# И пусть вектор v имеет 5 элементов, вычисляемых по формуле v_n= n^2.
# Решение:
m := 0 .. 4
n := 0 .. 4
M[m, n] :=
    m + n if (m ≠ n)
    2*m + 0.1 if (m == n)
M = [0.1, 1, 2, 3, 4; 1, 2.1, 3, 4, 5; 2, 3, 4.1, 5, 6; 3, 4, 5, 6.1, 7; 4, 5, 6, 7, 8.1]
k := 0 .. 4
v[k] := k^2
v = [0; 1; 4; 9; 16]
# 2) Найти: определитель матрицы M, определитель матрицы M^2, число обусловленности матрицы M, обратную к M матрицу.
|M| = -0.04799
|M^2| = 0.00230304
M^-1 = [
    3.7487, -4.1467, -2.04209, 0.062513, 2.16712;
    -4.1467, 6.91602, -2.02125, -0.958533, 0.104188;
    -2.04209, -2.02125, 7.99958, -1.97958, -1.95874;
    0.062513, -0.958533, -1.97958, 6.99937, -4.02167;
    2.16712, 0.104188, -1.95874, -4.02167, 3.9154
]
cond1(M) = 481.638
# 3) Решить систему линейных уравнений вида Mx= v двумя способами.
x := M^-1*v
x = [22.9214; -8.12878; -19.179; -10.2292; 18.7206]
lsolve(M, v) = [22.9214; -8.12878; -19.179; -10.2292; 18.7206]
# 4) Оценить погрешность вычисления обратной матрицы.
M*M^-1 = [1, 0, 0, 0, 0; 0, 1, 0, 0, 0; 0, 0, 1, 0, 0; 0, 0, 0, 1, 0; 0, 0, 0, 0, 1]
# 5) Оценить погрешность решения системы уравнений.
M*x = [0; 1; 4; 9; 16]
M*lsolve(M, v) = [0; 1; 4; 9; 16]
# 6) Придумать невырожденную симметричную квадратную матрицу N размером 7x7 с ненулевыми элементами и вектор w соответствующего размера. И для этой пары массивов решить систему линейных уравнений Nx = w, оценить погрешность решения этой системы.
t := 0 .. 6
p := 0 .. 6
N[t, p] :=
    (2*t + 2*p) if (t ≠ p)
    (50 + t) if (t == p)
|N| = 5.08345e11
N = [
    50, 2, 4, 6, 8, 10, 12;
    2, 51, 6, 8, 10, 12, 14;
    4, 6, 52, 10, 12, 14, 16;
    6, 8, 10, 53, 14, 16, 18;
    8, 10, 12, 14, 54, 18, 20;
    10, 12, 14, 16, 18, 55, 22;
    12, 14, 16, 18, 20, 22, 56
]
r := 0 .. 6
w[r] := 2 + 3*r
w = [2; 5; 8; 11; 14; 17; 20]
y := N^-1*w
y = [-0.0798611; -0.041498; 0.00209642; 0.0520705; 0.109935; 0.17772; 0.258214]
N*y = [2; 5; 8; 11; 14; 17; 20]
# 7) Матрицу N разложить в произведение треугольных матриц.
L := cholesky(N)
transpose(L) = [
    7.07107, 0.282843, 0.565685, 0.848528, 1.13137, 1.41421, 1.69706;
    0, 7.13583, 0.818406, 1.08747, 1.35654, 1.6256, 1.89467;
    0, 0, 7.14214, 1.20832, 1.43512, 1.66191, 1.8887;
    0, 0, 0, 7.04538, 1.39534, 1.56473, 1.73411;
    0, 0, 0, 0, 6.84641, 1.40606, 1.51607;
    0, 0, 0, 0, 0, 6.5704, 1.29917;
    0, 0, 0, 0, 0, 0, 6.24256
]
L = [
    7.07107, 0, 0, 0, 0, 0, 0;
    0.282843, 7.13583, 0, 0, 0, 0, 0;
    0.565685, 0.818406, 7.14214, 0, 0, 0, 0;
    0.848528, 1.08747, 1.20832, 7.04538, 0, 0, 0;
    1.13137, 1.35654, 1.43512, 1.39534, 6.84641, 0, 0;
    1.41421, 1.6256, 1.66191, 1.56473, 1.40606, 6.5704, 0;
    1.69706, 1.89467, 1.8887, 1.73411, 1.51607, 1.29917, 6.24256
]
N = [
    50, 2, 4, 6, 8, 10, 12;
    2, 51, 6, 8, 10, 12, 14;
    4, 6, 52, 10, 12, 14, 16;
    6, 8, 10, 53, 14, 16, 18;
    8, 10, 12, 14, 54, 18, 20;
    10, 12, 14, 16, 18, 55, 22;
    12, 14, 16, 18, 20, 22, 56
]
L*transpose(L) = [
    50, 2, 4, 6, 8, 10, 12;
    2, 51, 6, 8, 10, 12, 14;
    4, 6, 52, 10, 12, 14, 16;
    6, 8, 10, 53, 14, 16, 18;
    8, 10, 12, 14, 54, 18, 20;
    10, 12, 14, 16, 18, 55, 22;
    12, 14, 16, 18, 20, 22, 56
]
# 8) Найти N^100
N^100 = [
    1.7179e210, 2.13017e210, 2.51381e210, 2.87172e210, 3.20639e210, 3.52002e210, 3.81454e210;
    2.13017e210, 2.64137e210, 3.11708e210, 3.56088e210, 3.97587e210, 4.36476e210, 4.72995e210;
    2.51381e210, 3.11708e210, 3.67847e210, 4.20219e210, 4.69192e210, 5.15086e210, 5.58182e210;
    2.87172e210, 3.56088e210, 4.20219e210, 4.80048e210, 5.35994e210, 5.88422e210, 6.37654e210;
    3.20639e210, 3.97587e210, 4.69192e210, 5.35994e210, 5.98459e210, 6.56997e210, 7.11966e210;
    3.52002e210, 4.36476e210, 5.15086e210, 5.88422e210, 6.56997e210, 7.21261e210, 7.81607e210;
    3.81454e210, 4.72995e210, 5.58182e210, 6.37654e210, 7.11966e210, 7.81607e210, 8.47002e210
]
