# Казанцев Илья 25 вариант Лабораторная работа №3
# Найти максимальный элемент каждой строки исходного массива A(N,N) (N<=10) и поместить их на главную диагональ, а диагональные элементы записать на место максимальных.
ORIGIN := 1
N := 10
M := 10
A(N, M) :=
    for i ∈ 1 .. N
        max ← 0
        for j ∈ 1 .. M
            a[i, j] ← i^2 + 4*j + 2
    return a
# Массив до преобразований:
A(N, M) = [
    7, 11, 15, 19, 23, 27, 31, 35, 39, 43;
    10, 14, 18, 22, 26, 30, 34, 38, 42, 46;
    15, 19, 23, 27, 31, 35, 39, 43, 47, 51;
    22, 26, 30, 34, 38, 42, 46, 50, 54, 58;
    31, 35, 39, 43, 47, 51, 55, 59, 63, 67;
    42, 46, 50, 54, 58, 62, 66, 70, 74, 78;
    55, 59, 63, 67, 71, 75, 79, 83, 87, 91;
    70, 74, 78, 82, 86, 90, 94, 98, 102, 106;
    87, 91, 95, 99, 103, 107, 111, 115, 119, 123;
    106, 110, 114, 118, 122, 126, 130, 134, 138, 142
]
A(N, M) :=
    for i ∈ 1 .. N
        max ← 0
        for j ∈ 1 .. M
            a[i, j] ← i^2 + 4*j + 2
            if a[i, j] > max
                max ← a[i, j]
                maxi ← i
                maxj ← j
        a[maxi, maxj] ← a[i, i]
        a[i, i] ← max
    return a
# Массив после преобразований:
A(N, M) = [
    43, 11, 15, 19, 23, 27, 31, 35, 39, 7;
    10, 46, 18, 22, 26, 30, 34, 38, 42, 14;
    15, 19, 51, 27, 31, 35, 39, 43, 47, 23;
    22, 26, 30, 58, 38, 42, 46, 50, 54, 34;
    31, 35, 39, 43, 67, 51, 55, 59, 63, 47;
    42, 46, 50, 54, 58, 78, 66, 70, 74, 62;
    55, 59, 63, 67, 71, 75, 91, 83, 87, 79;
    70, 74, 78, 82, 86, 90, 94, 106, 102, 98;
    87, 91, 95, 99, 103, 107, 111, 115, 123, 119;
    106, 110, 114, 118, 122, 126, 130, 134, 138, 142
]
# Сформировать двумерный массив A_NxM. Все элементы, чье значение увеличенное на единицу и возведённое в квадрат будет больше 50, умножить на два. Массив вывести до и после преобразования.
N := 10
M := 15
A[N, M] :=
    for i ∈ 1 .. N
        for j ∈ 1 .. M
            b[i, j] ← mod(i + j, 10)
    return b
# Массив до преобразований:
A[N, M] = [
    2, 3, 4, 5, 6, 7, 8, 9, 0, 1, 2, 3, 4, 5, 6;
    3, 4, 5, 6, 7, 8, 9, 0, 1, 2, 3, 4, 5, 6, 7;
    4, 5, 6, 7, 8, 9, 0, 1, 2, 3, 4, 5, 6, 7, 8;
    5, 6, 7, 8, 9, 0, 1, 2, 3, 4, 5, 6, 7, 8, 9;
    6, 7, 8, 9, 0, 1, 2, 3, 4, 5, 6, 7, 8, 9, 0;
    7, 8, 9, 0, 1, 2, 3, 4, 5, 6, 7, 8, 9, 0, 1;
    8, 9, 0, 1, 2, 3, 4, 5, 6, 7, 8, 9, 0, 1, 2;
    9, 0, 1, 2, 3, 4, 5, 6, 7, 8, 9, 0, 1, 2, 3;
    0, 1, 2, 3, 4, 5, 6, 7, 8, 9, 0, 1, 2, 3, 4;
    1, 2, 3, 4, 5, 6, 7, 8, 9, 0, 1, 2, 3, 4, 5
]
A[N, M] :=
    for i ∈ 1 .. N
        for j ∈ 1 .. M
            b[i, j] ← mod(i + j, 10)
            b[i, j] ← 2*b[i, j] if (b[i, j] + 1)^2 > 50
    return b
# Массив после преобразований:
A[N, M] = [
    2, 3, 4, 5, 6, 14, 16, 18, 0, 1, 2, 3, 4, 5, 6;
    3, 4, 5, 6, 14, 16, 18, 0, 1, 2, 3, 4, 5, 6, 14;
    4, 5, 6, 14, 16, 18, 0, 1, 2, 3, 4, 5, 6, 14, 16;
    5, 6, 14, 16, 18, 0, 1, 2, 3, 4, 5, 6, 14, 16, 18;
    6, 14, 16, 18, 0, 1, 2, 3, 4, 5, 6, 14, 16, 18, 0;
    14, 16, 18, 0, 1, 2, 3, 4, 5, 6, 14, 16, 18, 0, 1;
    16, 18, 0, 1, 2, 3, 4, 5, 6, 14, 16, 18, 0, 1, 2;
    18, 0, 1, 2, 3, 4, 5, 6, 14, 16, 18, 0, 1, 2, 3;
    0, 1, 2, 3, 4, 5, 6, 14, 16, 18, 0, 1, 2, 3, 4;
    1, 2, 3, 4, 5, 6, 14, 16, 18, 0, 1, 2, 3, 4, 5
]
# Дана последовательность. F_1 = 1, F_2 = 1, F_n =  F_(n-1)+ F_n-2.  Найти сумму  с точностью до 10^(-12)
sum(1/F[n], n)
n := 1 .. 10
F[n] :=
    1 if (n == 1) or (n == 2)
    F[n - 1] + F[n - 2] otherwise
F[n] = [1; 1; 2; 3; 5; 8; 13; 21; 34; 55]
sum(1/F[n], n) = 3.33047
