# Казанцев Илья 1ПМИ 2 группа 25 вариант
# 1) Вычислить произведение чисел
product(1 - 1/(2*k + 1)^2, k = 1 .. ∞)
product(1 - 1/(2*k + 1)^2, k = 1 .. ∞) → π/4
# 2) Вычислить сумму
sum(e^(-k), k = 1 .. ∞)
sum(e^(-k), k = 1 .. ∞) → -e^-1/(e^-1 - 1)
# 3) Найти пределы
limit(sin(x)/x, x → 0)
limit((ln(x) - 1)/(x - e), x → e)
limit(sin(x)/x, x → 0) → 1
limit((ln(x) - 1)/(x - e), x → e) → e^-1
# 4) Найти односторонние пределы
limit(x*ln(x), x → 0+)
limit(x^sin(x), x → 0+)
limit(x*ln(x), x → 0+) → 0
limit(x^sin(x), x → 0+) → 1
# 5) Найти производные функций y=sinx^3  y=e^x*lnx  y=x^x
sin(x)^3
3*cos(x)*sin(x)^2
x^x
x*x^(x - 1) + x^x*ln(x)
e^x*ln(x)
e^x/x + e^x*ln(x)
# 6) Для функции f(x)=x/(2x-1) найти f"(0), f''(1), f'''(2)
f(x) := x/(2*x - 1)
x := 0
d/dx(f(x)) = -1
x := 1
d^2/dx^2(f(x)) = 4
x := 2
d^3/dx^3(f(x)) = -0.296296
# 7) Вычислить неопределенные интегралы
integral(sin(x)^3, x)
integral((5*x + 3)*sqrt(x^2 + 3*x + 5), x)
x := x
integral(sin(x)^3, x) → cos(3*x)/12 - 3*cos(x)/4
integral((5*x + 3)*sqrt(x^2 + 3*x + 5), x) → 33*ln(x + sqrt(x^2 + 3*x + 5) + 3/2)/8 - 165*ln(2*x + 2*sqrt(x^2 + 3*x + 5) + 3)/16 + 3*(x/2 + 3/4)*sqrt(x^2 + 3*x + 5) + 5*(8*x^2 + 6*x + 13)*sqrt(x^2 + 3*x + 5)/24
# 8) Вычислить определенные интегралы
integral(sin(x), x = 0 .. 2*π)
integral(e^(-x), x = 0 .. 0 + ∞)
integral(ln(x)^2, x = 0 .. 1)
integral(sin(x), x = 0 .. 2*π) → 0
integral(e^(-x), x = 0 .. 0 + ∞) → 1
integral(ln(x)^2, x = 0 .. 1) → 2
# 9) Разложить функции в ряд Тейлора, найти 10 членов ряда sinx  arccosx
sin(x) series, 10 → x - x^3/6 + x^5/120 - x^7/5040 + x^9/362880
acos(x) series, 10 → π/2 - x - x^3/6 - 3*x^5/40 - 5*x^7/112 - 35*x^9/1152
# 10) Сделать указанную подстановку и упростить результат  x=(4ab)/(a+b)
((x + 2*a)/(x - 2*a) + (x + 2*b)/(x - 2*b))/(x/2)
((x + 2*a)/(x - 2*a) + (x + 2*b)/(x - 2*b))/(x/2) substitute, x == 4*a*b/(a + b) → (a + b)/(a*b) simplify → 1/a + 1/b
# 11) Найти корни многочлена
# a) x^5+(b-a)x^4-abx^3+ax^2+a(b-a)x-a^2b
# b) x^7+6x^6+x^5-4x^4+x^3-2x^2+x-1
x^5 + (b - a)*x^4 - a*b*x^3 + a*x^2 + a*(b - a)*x - a^2*b solve, x → [
    a;
    -b;
    (-a)^(1/3);
    -(-a)^(1/3)/2 + sqrt(3)*(-a)^(1/3)*1i/2;
    -(-a)^(1/3)/2 - sqrt(3)*(-a)^(1/3)*1i/2
]
x^7 + 6*x^6 + x^5 - 4*x^4 + x^3 - 2*x^2 + x - 1 solve, x → [
    0.853680945925;
    -1.30818978312;
    -5.69344239631;
    -0.265710085251 + 0.616625232144i;
    -0.265710085251 - 0.616625232144i;
    0.339685702004 + 0.483187894842i;
    0.339685702004 - 0.483187894842i
]
# 12) Задать квадратную 3-х диагональную матрицу A размером (nxn) с буквенными элементами: на диагонали a, над диагональю -1;под диагональю b.
# Для разных размеров матрицы (2, 4, 8, 16) найти определитель.
# Задать числовой вектор: C= (2  1  2  1  2  ...).
# Решить систему: Ax= C
ORIGIN := 1
n := 2
a := 1
b := 2
M := 1 .. n
N := 1 .. n
A[M, N] :=
    a if M == N
    b if M == (N + 1)
    -1 if M == (N - 1)
    0 otherwise
C[M] :=
    2 if mod(M, 2) ≠ 0
    1 otherwise
x := A^-1*C
A = [1, -1; 2, 1]
C = [2; 1]
x = [1; -1]
n := 4
a := 1
b := 2
M := 1 .. n
N := 1 .. n
A[M, N] :=
    a if M == N
    b if M == (N + 1)
    -1 if M == (N - 1)
    0 otherwise
C[M] :=
    2 if mod(M, 2) ≠ 0
    1 otherwise
x := A^-1*C
A = [1, -1, 0, 0; 2, 1, -1, 0; 0, 2, 1, -1; 0, 0, 2, 1]
C = [2; 1; 2; 1]
x = [1.45455; -0.545455; 1.36364; -1.72727]
n := 8
a := 1
b := 2
M := 1 .. n
N := 1 .. n
A[M, N] :=
    a if M == N
    b if M == (N + 1)
    -1 if M == (N - 1)
    0 otherwise
C[M] :=
    2 if mod(M, 2) ≠ 0
    1 otherwise
x := A^-1*C
A = [
    1, -1, 0, 0, 0, 0, 0, 0;
    2, 1, -1, 0, 0, 0, 0, 0;
    0, 2, 1, -1, 0, 0, 0, 0;
    0, 0, 2, 1, -1, 0, 0, 0;
    0, 0, 0, 2, 1, -1, 0, 0;
    0, 0, 0, 0, 2, 1, -1, 0;
    0, 0, 0, 0, 0, 2, 1, -1;
    0, 0, 0, 0, 0, 0, 2, 1
]
C = [2; 1; 2; 1; 2; 1; 2; 1]
x = [1.64912; -0.350877; 1.94737; -0.754386; 2.14035; -1.36842; 1.91228; -2.82456]
n := 16
a := 1
b := 2
M := 1 .. n
N := 1 .. n
A[M, N] :=
    a if M == N
    b if M == (N + 1)
    -1 if M == (N - 1)
    0 otherwise
C[M] :=
    2 if mod(M, 2) ≠ 0
    1 otherwise
x := A^-1*C
A = [
    1, -1, 0, 0, 0, 0, 0, 0, 0, 0, 0, 0, 0, 0, 0, 0;
    2, 1, -1, 0, 0, 0, 0, 0, 0, 0, 0, 0, 0, 0, 0, 0;
    0, 2, 1, -1, 0, 0, 0, 0, 0, 0, 0, 0, 0, 0, 0, 0;
    0, 0, 2, 1, -1, 0, 0, 0, 0, 0, 0, 0, 0, 0, 0, 0;
    0, 0, 0, 2, 1, -1, 0, 0, 0, 0, 0, 0, 0, 0, 0, 0;
    0, 0, 0, 0, 2, 1, -1, 0, 0, 0, 0, 0, 0, 0, 0, 0;
    0, 0, 0, 0, 0, 2, 1, -1, 0, 0, 0, 0, 0, 0, 0, 0;
    0, 0, 0, 0, 0, 0, 2, 1, -1, 0, 0, 0, 0, 0, 0, 0;
    0, 0, 0, 0, 0, 0, 0, 2, 1, -1, 0, 0, 0, 0, 0, 0;
    0, 0, 0, 0, 0, 0, 0, 0, 2, 1, -1, 0, 0, 0, 0, 0;
    0, 0, 0, 0, 0, 0, 0, 0, 0, 2, 1, -1, 0, 0, 0, 0;
    0, 0, 0, 0, 0, 0, 0, 0, 0, 0, 2, 1, -1, 0, 0, 0;
    0, 0, 0, 0, 0, 0, 0, 0, 0, 0, 0, 2, 1, -1, 0, 0;
    0, 0, 0, 0, 0, 0, 0, 0, 0, 0, 0, 0, 2, 1, -1, 0;
    0, 0, 0, 0, 0, 0, 0, 0, 0, 0, 0, 0, 0, 2, 1, -1;
    0, 0, 0, 0, 0, 0, 0, 0, 0, 0, 0, 0, 0, 0, 2, 1
]
C = [2; 1; 2; 1; 2; 1; 2; 1; 2; 1; 2; 1; 2; 1; 2; 1]
x = [1.66657; -0.333433; 1.9997; -0.667163; 2.33224; -1.00208; 2.6624; -1.34176; 2.98304; -1.70049; 3.26559; -2.13538; 3.3958; -2.87496; 2.91664; -4.83328]
