# 1) Вычислить 3 переменных и сохранить их в файле
ORIGIN := 1
a[1] := 2*64 + 3 + 48
a[1] → 179
a[2] := 4 + a[1]*32
a[2] → 5732
a[3] := a[1] + a[2]
a[3] → 5911
file := "first.txt"
first := [a[1], a[2], a[3]]
WRITEPRN(file) := first
# 2) Задать матрицу и сохранить в файле
n := 1 .. 5
m := 1 .. 10
second[n, m] :=
    1 if n == m
    3*n + 4*m otherwise
second = [
    1, 11, 15, 19, 23, 27, 31, 35, 39, 43;
    10, 1, 18, 22, 26, 30, 34, 38, 42, 46;
    13, 17, 1, 25, 29, 33, 37, 41, 45, 49;
    16, 20, 24, 1, 32, 36, 40, 44, 48, 52;
    19, 23, 27, 31, 1, 39, 43, 47, 51, 55
]
file := "second.txt"
WRITEPRN(file) := second
# 3) Прочитать данные из файла
file := "third.txt"
third := READPRN(file)
third = [482, 42; 34, 88]
# 4) По таблице Exsel построить графики
file := "fourth.xlsx"
fourth1 := READEXCEL(file, "List1!A1:A20")
fourth3 := READEXCEL(file, "List1!G1:J20")
fourth2 := READEXCEL(file, "List1!B1:B20")
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# [component: inputs fourth3]
# 5) Записать в таблице Exsel матрицу MathCad
fiveth[n, m] :=
    1 if n == m == 1
    3*n*m + 4
fiveth = [
    7, 10, 13, 16, 19, 22, 25, 28, 31, 34;
    10, 16, 22, 28, 34, 40, 46, 52, 58, 64;
    13, 22, 31, 40, 49, 58, 67, 76, 85, 94;
    16, 28, 40, 52, 64, 76, 88, 100, 112, 124;
    19, 34, 49, 64, 79, 94, 109, 124, 139, 154
]
file := "fiveth.xlsx"
fiveth1 := WRITEEXCEL(fiveth, file, "List1!A1:J5")
